<?xml version="1.0" ?>
<!-- $Id: LZ-129_prop.xml,v 1.1 2007-06-12 00:30:10 anders Exp $ -->
<!--

  LZ-129 Hindenburg flight model for JSBSim with my LTA patch.

    Copyright (C) 2007  Anders Gidenstam  (anders(at)gidenstam.org)

    This program is free software; you can redistribute it and/or modify
    it under the terms of the GNU General Public License as published by
    the Free Software Foundation; either version 2 of the License, or
    (at your option) any later version.

    This program is distributed in the hope that it will be useful,
    but WITHOUT ANY WARRANTY; without even the implied warranty of
    MERCHANTABILITY or FITNESS FOR A PARTICULAR PURPOSE.  See the
    GNU General Public License for more details.

    You should have received a copy of the GNU General Public License
    along with this program; if not, write to the Free Software
    Foundation, Inc., 59 Temple Place, Suite 330, Boston, MA  02111-1307  USA

-->
<!--

       Engine data from [Bentele, 1992]:

       Manufacturer:        Daimler Bentz AG
       Type:                LOF 6 (DB 602) (Diesel)
       No. cylinders:       V 16
       Max power:           1050 HP
       Max rpm:             1500 rpm
       Cruise power:        940 HP
       Cruise rpm:          1350 rpm
       Swept volume:        88 dm3
       Weight (w/o cooler): 2200 kg
       Power/weight ration: 2.8 kg/kWh
       Fuel consumption (cruise): 0.225 kg/kWh
       Piston diameter:     175 mm
       Piston stroke:       230 mm
       Compression ration:  1:16
       Reduction gear:      2:1
       Propeller diameter:  6.0 m
       Propeller rpm (cruise): 625 rpm

       Notes: 2 input, 2 output valves. No supercharger. Could rotate
              in either direction. Compressed air starter.

  References :
  ==========

  - Eugen Bentele, "The Story of a Zeppelin Mechanic",
    Zeppelin-Museum Friedrichshafen, 1992.

-->
<!--
  NOTE: Most propeller data is copied from HamiltonStd6243A-3.xml
-->

<propeller name="LZ-129_prop">

  <ixx> 50.810 </ixx>
  <diameter unit="M"> 6.0 </diameter>
  <numblades> 4 </numblades>
  <gearratio> 2.0 </gearratio>
  <minpitch> 20 </minpitch>
  <maxpitch> 20 </maxpitch>

  <table name="C_THRUST" type="internal">
    <tableData>
           10      45
      0.0  0.06739 0.0842
      0.1  0.06674 0.0838
      0.2  0.06610 0.0834
      0.3  0.06545 0.0830
      0.4  0.05963 0.0826
      0.5  0.01771 0.0822
      0.6  0.01512 0.0818
      0.7  0.01176 0.0782
      0.8  0.00864 0.0745
      0.9  0.00480 0.0705
      1.0  0.00096 0.0664
      1.2  0.00000 0.0567
      1.4  0.00000 0.0441
      1.6  0.00000 0.0324
      1.8  0.00000 0.0180
      2.0  0.00000 0.0036
    </tableData>
  </table>

  <table name="C_POWER" type="internal">
    <tableData>
             10      20
        0.0  0.01144 0.05198
        0.1  0.01126 0.05159
        0.2  0.01109 0.05119
        0.3  0.01074 0.05080
        0.4  0.01040 0.05040
        0.5  0.01005 0.04962
        0.6  0.00953 0.04883
        0.7  0.00832 0.04804
        0.8  0.00658 0.04725
        0.9  0.00433 0.04647
        1.0  0.00173 0.04568
        1.2  0.00000 0.04331
        1.4  0.00000 0.03780
        1.6  0.00000 0.02993
        1.8  0.00000 0.01969
        2.0  0.00000 0.00788
    </tableData>
  </table>
</propeller>
