<?xml version="1.0"?>
<!-- $Id: LZ-129_crew_ap.xml,v 1.4 2007-02-07 23:49:28 anders Exp $ -->
<!--

  LZ-129 Hindenburg flight model for JSBSim with my LTA patch.

    Copyright (C) 2006 - 2007  Anders Gidenstam  (anders(at)gidenstam.org)

    This program is free software; you can redistribute it and/or modify
    it under the terms of the GNU General Public License as published by
    the Free Software Foundation; either version 2 of the License, or
    (at your option) any later version.

    This program is distributed in the hope that it will be useful,
    but WITHOUT ANY WARRANTY; without even the implied warranty of
    MERCHANTABILITY or FITNESS FOR A PARTICULAR PURPOSE.  See the
    GNU General Public License for more details.

    You should have received a copy of the GNU General Public License
    along with this program; if not, write to the Free Software
    Foundation, Inc., 59 Temple Place, Suite 330, Boston, MA  02111-1307  USA

-->

<autopilot name="LZ-129 Crew Autopilot">

  <!-- INTERFACE PROPERTIES -->
  <property>ap/rudder-coxswain-active</property>
  <property>ap/heading-setpoint-degrees</property>
  <property>ap/rudder-cmd-norm</property>
  <property>ap/elevator-coxswain-active</property>
  <property>ap/pitch-setpoint-degrees</property>
  <property>ap/elevator-cmd-norm</property>

  <!-- SENSORS -->

  <!-- CHANNELS -->

  <channel name="fcs/ap-rudder-coxswain">

    <!-- The heading error chain is from c172ap.xml by Jon Berndt. -->
    <pure_gain name="fcs/heading-true-degrees">
      <input>attitude/heading-true-rad</input>
      <gain>57.3</gain> <!-- convert to degrees -->
    </pure_gain>

    <summer name="fcs/heading-error">
      <input> -fcs/heading-true-degrees</input>
      <input> ap/heading-setpoint-degrees </input>
    </summer>

    <switch name="fcs/heading-error-bias-switch">
      <default value="0.0"/>
      <test value="360.0">
        fcs/heading-error lt -180
      </test>
      <test value="-360.0">
        fcs/heading-error gt 180
      </test>
    </switch>

    <summer name="fcs/heading-corrected">
      <input> fcs/heading-error-bias-switch </input>
      <input> fcs/heading-error </input>
      <clipto>
        <min>-30</min>
        <max> 30</max>
      </clipto>
    </summer>

    <pid name="Heading AP PID">
      <input> fcs/heading-corrected </input>
      <kp>  100.00 </kp>
      <ki>    0.10 </ki>
      <kd>    0.00 </kd>
     <clipto>
        <min>-1.0</min>
        <max> 1.0</max>
      </clipto>
    </pid>

    <pid name="Yaw damper PID">
      <input> aero/beta-deg </input>
      <kp>    0.50  </kp>
      <ki>    0.001 </ki>
      <kd>    0.000 </kd>
     <clipto>
        <min>-1.0</min>
        <max> 1.0</max>
      </clipto>
    </pid>

    <summer name="fcs/heading-ap-sum">
      <!-- input> -fcs/heading-ap-pid </input -->
      <input> -fcs/yaw-damper-pid </input>
    </summer>

    <switch name="Heading AP Autoswitch">
      <default value="0.0"/>
      <test logic="AND" value="fcs/heading-ap-sum">
            ap/rudder-coxswain-active == 1
            fcs/rudder-cmd-norm gt -0.1
            fcs/rudder-cmd-norm lt 0.1
      </test>
    </switch>

    <pure_gain name="Heading AP Rudder Command Normalizer">
      <input>fcs/heading-ap-autoswitch</input>
      <gain>1</gain>
      <output>ap/rudder-cmd-norm</output>
    </pure_gain>

  </channel>

  <channel name="fcs/ap-elevator-coxswain">

    <pure_gain name="fcs/ap-pitch-setpoint-rad">
      <input> ap/pitch-setpoint-degrees </input>
      <gain>0.017453</gain>
    </pure_gain>

    <summer name="fcs/pitch-error">
      <input> attitude/theta-rad</input>
      <input> -fcs/ap-pitch-setpoint-rad </input>
    </summer>

    <pid name="Pitch AP PID">
      <input> fcs/pitch-error </input>
      <kp> 500.00 </kp>
      <ki>   0.00 </ki>
      <kd>  20.00  </kd>
      <clipto>
        <min>-1.0</min>
        <max> 1.0</max>
      </clipto>
    </pid>

    <switch name="Pitch AP Autoswitch">
      <default value="0.0"/>
      <test logic="AND" value="fcs/pitch-ap-pid">
            ap/elevator-coxswain-active == 1
      </test>
    </switch>

    <pure_gain name="Pitch AP Elevator Command Normalizer">
      <input>fcs/pitch-ap-autoswitch</input>
      <gain>1</gain>
      <output>ap/elevator-cmd-norm</output>
    </pure_gain>

  </channel>

  <channel name="fcs/ap-boyancy-weigh-off">

  </channel>

</autopilot>
